i := 0 .. 8
x := [1; 3; 4; 6; 7; 8; 10; 11; 13]
y := [2; 10; 17; 33; 57; 66; 96; 120; 172]
D := regress(x, y, 1)
transpose(D) = [3, 3, 1, -33.9946, 13.9516]
f[i] := interp(D, x, y, x[i])
SS := augment(x, y, f)
εε := f - y
sqrt(transpose(εε)*εε) = 40.8621
transpose(SS) = [
    1, 3, 4, 6, 7, 8, 10, 11, 13;
    2, 10, 17, 33, 57, 66, 96, 120, 172;
    -20.043, 7.86022, 21.8118, 49.7151, 63.6667, 77.6183, 105.522, 119.473, 147.376
]
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D := regress(x, y, 2)
transpose(D) = [3, 3, 2, 1.35809, -0.100254, 1.0037]
f[i] := interp(D, x, y, x[i])
SS := augment(x, y, f)
εε := f - y
sqrt(transpose(εε)*εε) = 9.9286
transpose(SS) = [
    1, 3, 4, 6, 7, 8, 10, 11, 13;
    2, 10, 17, 33, 57, 66, 96, 120, 172;
    2.26154, 10.0907, 17.0163, 36.8899, 49.8378, 64.7932, 100.726, 121.704, 169.681
]
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i := 0 .. 9
kk := [0.1; 1; 3]
d := lgsfit(x, y, kk)
transpose(d) = [284.485, 52.0564, 0.334487]
f := d[0]/(1 + d[1]*e^(-d[2]*x))
εε := f - y
sqrt(transpose(εε)*εε) = 14.1076
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# Вывод : в качастве модели принимаем параболу.
